((4.625 - 13*9/(18*26))/(9/4) + 2.5/1.25/6.75)/(1 + 53/68)/((1/2 - 0.375)/0.125 + (5/6 - 7/12) + (0.358 - 1.4796/13.7)) = 0.839506
2/9*1.8 = 0.4
r := 8
π*r^2 = 201.062
integral(ln(x)^2/sqrt(x^5), x)
S(r) := π*r^2
a(r) =  # error: Эта переменная не определена.
